# Дано | определение передаточных функций
k1 := 10
k5 := 12
T1 := 0
T4 := 0
T7 := 0
α1 := 0
k2 := 4
k6 := 5
T2 := 1
T5 := 0.33
T8 := 0
α2 := 1
k3 := 2
k7 := 1
T3 := 0.2
T6 := 0.109
τ2 := 0
α3 := 1
k4 := 2.5
W1(p) := k1/(T1*p + 1) → 10
W2(p) := k2/(T2*p + α1) → 4/p
W3(p) := k3*(τ2*p + α2)/(T3*p + 1) → 2/(0.2*p + 1)
W4(p) := k4/(T4*p + 1) → 2.5
W5(p) := k5/(T6^2*p^2 + T5*p + 1) → 12/(0.33*p + 0.011881*p^2 + 1)
W6(p) := k6/(T7*p + α3) → 5
W7(p) := k7/(T8*p + 1) → 1
